# OpenSim document version 40600
Model gait14dof15musc2act_RTFP_3D:
  gravity: 0 -9.80665 0
  length_units: meters
  force_units: N
  credits:
    An osseointegrated transfemoral amputee model with 14 active dof and 15 muscles with 2 dynamic actuators at prosthetic knee and ankle.(based on A reduced planar gait model with 14 degrees of freedom and 22 muscles) (based on planar gait9dof18 by Ajay Seth). Adjusted by Carmichael Ong to follow muscle strengths of Handsfield/Rajagopal and changed hamstrings to follow semimembranosus and to adjust passive curves of hamstrings, rect_fem, and vasti. Closely based on Delp S.L., Loan J.P., Hoy M.G., Zajac F.E., Topp E.L., Rosen J.M., Thelen D.G., Anderson F.C., Seth A. Notes: 3D, 23 DOF gait model created by D.G. Thelen, Univ. of Wisconsin-Madison, and Ajay Seth, Frank C. Anderson, and Scott L. Delp, Stanford University. Lower extremity joint defintions based on Delp et al. (1990). Low back joint and anthropometry based on Anderson and Pandy (1999, 2001). Planar knee model of Yamaguchi and Zajac (1989). Seth replaced tibia translation constraints with a CustomJoint for the knee and removed the patella to eliminate all kinematic constraints; insertions of the quadrucepts are handled with moving points in the tibia frame as defined by Delp 1990. Number of muscles was reduced by Anderson to improve simulation speed for demonstrations and is not intended to be used in research. License: Creative Commons (CCBY 3.0). You are free to distribute, remix, tweak, and build upon this work, even commercially, as long as you credit us for the original creation. http://creativecommons.org/licenses/by/3.0/ More Information: http://simtk-confluence.stanford.edu:8080/display/OpenSim/Gait+2392+and+2354+Models
  publications:
    R. Carloni, R. Luinge, V. Raveendranathan: The gait1415+2 OpenSim musculoskeletal model of transfemoral amputees with a generic bone-anchored prosthesis, Delp, S.L., Loan, J.P., Hoy, M.G., Zajac, F.E., Topp E.L., Rosen, J.M.: An interactive graphics-based model of the lower extremity to study orthopaedic surgical procedures, IEEE Transactions on Biomedical Engineering, vol. 37, pp. 757-767, 1990. Yamaguchi G.T., Zajac F.E.: A planar model of the knee joint to characterize the knee extensor mechanism." J . Biomech. vol. 22. pp. 1-10. 1989. Anderson F.C., Pandy M.G.: A dynamic optimization solution for vertical jumping in three dimensions. Computer Methods in Biomechanics and Biomedical Engineering 2:201-231, 1999. Anderson F.C., Pandy M.G.: Dynamic optimization of human walking. Journal of Biomechanical Engineering 123:381-390, 2001.
  SmoothSphereHalfSpaceForce [values shared by the 8 below unless stated]: socket_half_space=/contactgeometryset/floor
      stiffness=3067776 [N/m^2] dissipation=2 [s/m] static_friction=0.8 dynamic_friction=0.8 viscous_friction=0.5
      transition_velocity=0.2 [m/s] hertz_smoothing=300 hunt_crossley_smoothing=50
  SmoothSphereHalfSpaceForce contactHeel_r_1: socket_sphere=/contactgeometryset/heel_r_1
  SmoothSphereHalfSpaceForce contactHeel_r_2: socket_sphere=/contactgeometryset/heel_r_2
  SmoothSphereHalfSpaceForce contactHeel_l_1: socket_sphere=/contactgeometryset/heel_l_1
  SmoothSphereHalfSpaceForce contactHeel_l_2: socket_sphere=/contactgeometryset/heel_l_2
  SmoothSphereHalfSpaceForce contactFront_r_1: socket_sphere=/contactgeometryset/front_r_1
  SmoothSphereHalfSpaceForce contactFront_r_2: socket_sphere=/contactgeometryset/front_r_2
  SmoothSphereHalfSpaceForce contactFront_l_1: socket_sphere=/contactgeometryset/front_l_1
  SmoothSphereHalfSpaceForce contactFront_l_2: socket_sphere=/contactgeometryset/front_l_2
  CoordinateActuator lumbarAct: min_control=-150 max_control=150 coordinate=lumbar_extension optimal_force=1
  Ground
  BodySet:
    Body pelvis: mass=11.777 [kg] mass_center=(-0.0707 0 0) inertia=(0.1028 0.0871 0.0579 0 0 0)
        meshes=(sacrum.vtp pelvis.vtp l_pelvis.vtp)
    Body transfemur: mass=4.6507 mass_center=(-0.00433826 -0.07004279 -0.00032697)
        inertia=(0.02269051 0.00260807 0.02392399 0.0032051 0.00044274 0.00248265) meshes=transfemur_r.stl
    Body foot_r: mass=0.8 mass_center=(0.01859594 -0.02128881 -8.061e-5)
        inertia=(0.0003692 0.00253222 0.0025252 -0.00022241 -9.34e-6 2.96e-6) meshes=VR_Foot_right.stl
    Body femur_l: mass=9.3014 mass_center=(0 -0.17 0) inertia=(0.1339 0.0351 0.1412 0 0 0) meshes=femur_l.vtp
    Body tibia_l: mass=3.7075 mass_center=(0 -0.1867 0) inertia=(0.0504 0.0051 0.0511 0 0 0)
        meshes=(tibia_l.vtp l_fibula.vtp)
    Body talus_l: mass=0.1 mass_center=(0 0 0) inertia=(0.001 0.001 0.001 0 0 0) meshes=l_talus.vtp
    Body calcn_l: mass=1.25 mass_center=(0.1 0.03 0) inertia=(0.0014 0.0039 0.0041 0 0 0) meshes=l_foot.vtp
    Body toes_l: mass=0.2166 mass_center=(0.0346 0.006 0.0175) inertia=(0.0001 0.0002 0.0001 0 0 0) meshes=l_bofoot.vtp
    Body torso: mass=34.2366 mass_center=(-0.03 0.32 0) inertia=(1.4745 0.7555 1.4314 0 0 0)
        meshes=(hat_spine.vtp hat_jaw.vtp hat_skull.vtp hat_ribs.vtp)
    Body head: mass=1 mass_center=(0 0 0) inertia=(0 0 0 0 0 0)
    Body cylinder: mass=1 mass_center=(0 0 0) inertia=(1 1 1 0 0 0)
      Cylinder cylinder_geom_1: scale_factors=(1 1 1) radius=0.025 half_height=0.25
    Body piston: mass=1 mass_center=(0 0 0) inertia=(1 1 1 0 0 0)
      Cylinder piston_geom_1: radius=0.01 half_height=0.25
  JointSet:
    CustomJoint ground_pelvis: socket_parent_frame=ground_offset socket_child_frame=pelvis_offset
      Coordinate pelvis_tilt: default_value=0 range=(-1.570796 1.570796) clamped=false
      Coordinate pelvis_list: default_value=0 range=(-1.570796 1.570796) clamped=false
      Coordinate pelvis_rotation: default_value=0 range=(-1.570796 1.570796) clamped=false
      Coordinate pelvis_tx: default_value=0 range=(-5 5) clamped=false
      Coordinate pelvis_ty: default_value=0.937 range=(-1 2) clamped=false
      Coordinate pelvis_tz: default_value=0 range=(-3 3) clamped=false
      PhysicalOffsetFrame ground_offset: socket_parent=/ground translation=(0 0 0) [meters]
      PhysicalOffsetFrame pelvis_offset: socket_parent=/bodyset/pelvis translation=(0 0 0)
      SpatialTransform:
        TransformAxis rotation1: coordinates=pelvis_tilt axis=(0 0 1) LinearFunction(coefficients=1 0)
        TransformAxis rotation2: coordinates=pelvis_list axis=(1 0 0) LinearFunction(coefficients=1 0)
        TransformAxis rotation3: coordinates=pelvis_rotation axis=(0 1 0) LinearFunction(coefficients=1 0)
        TransformAxis translation1: coordinates=pelvis_tx axis=(1 0 0) LinearFunction(coefficients=1 0)
        TransformAxis translation2: coordinates=pelvis_ty axis=(0 1 0) LinearFunction(coefficients=1 0)
        TransformAxis translation3: coordinates=pelvis_tz axis=(0 0 1) LinearFunction(coefficients=1 0)
    CustomJoint hip_r: socket_parent_frame=pelvis_offset socket_child_frame=transfemur_offset
      Coordinate hip_flexion_r: default_value=0 range=(-2.094395 2.094395) clamped=false
      Coordinate hip_adduction_r: default_value=0 range=(-2.094395 2.094395) clamped=false
      Coordinate hip_rotation_r: default_value=0 range=(-2.094395 2.094395) clamped=false
      PhysicalOffsetFrame pelvis_offset: socket_parent=/bodyset/pelvis translation=(-0.0707 -0.0661 0.0835)
      PhysicalOffsetFrame transfemur_offset: socket_parent=/bodyset/transfemur translation=(0 0 0)
      SpatialTransform: axes_held_at_zero=(translation1 translation2 translation3)
        TransformAxis rotation1: coordinates=hip_flexion_r axis=(0 0 1) LinearFunction(coefficients=1 0)
        TransformAxis rotation2: coordinates=hip_adduction_r axis=(1 0 0) LinearFunction(coefficients=1 0)
        TransformAxis rotation3: coordinates=hip_rotation_r axis=(0 1 0) LinearFunction(coefficients=1 0)
    WeldJoint osseo_pros: socket_parent_frame=transfemur_offset socket_child_frame=cylinder_offset
      PhysicalOffsetFrame transfemur_offset: socket_parent=/bodyset/transfemur translation=(0.019918 -0.45 0.02741407)
          orientation=(3.141593 5.022024e-16 -8.205818e-16) [radians]
      PhysicalOffsetFrame cylinder_offset: socket_parent=/bodyset/cylinder translation=(0 0 0)
    SliderJoint cylinder_piston: socket_parent_frame=cylinder_offset socket_child_frame=piston_offset
      Coordinate piston_ty: default_value=0.121 range=(0 0.25) clamped=false
      PhysicalOffsetFrame cylinder_offset: socket_parent=/bodyset/cylinder translation=(0 0 0)
          orientation=(1.570796 1.570796 0)
      PhysicalOffsetFrame piston_offset: socket_parent=/bodyset/piston translation=(0 0 0)
          orientation=(-1.570796 1.570796 0)
    PinJoint ankle_r: socket_parent_frame=piston_offset socket_child_frame=foot_r_offset
      Coordinate ankle_angle_r: default_value=0 range=(-1.047198 0.523599) clamped=false
      PhysicalOffsetFrame piston_offset: socket_parent=/bodyset/piston translation=(0 -0.25 0)
      PhysicalOffsetFrame foot_r_offset: socket_parent=/bodyset/foot_r translation=(0 0 0)
    CustomJoint hip_l: socket_parent_frame=pelvis_offset socket_child_frame=femur_l_offset
      Coordinate hip_flexion_l: default_value=0 range=(-2.094395 2.094395) clamped=false
      Coordinate hip_adduction_l: default_value=0 range=(-2.094395 2.094395) clamped=false
      Coordinate hip_rotation_l: default_value=0 range=(-2.094395 2.094395) clamped=false
      PhysicalOffsetFrame pelvis_offset: socket_parent=/bodyset/pelvis translation=(-0.0707 -0.0661 -0.0835)
      PhysicalOffsetFrame femur_l_offset: socket_parent=/bodyset/femur_l translation=(0 0 0)
      SpatialTransform: axes_held_at_zero=(translation1 translation2 translation3)
        TransformAxis rotation1: coordinates=hip_flexion_l axis=(0 0 1) LinearFunction(coefficients=1 0)
        TransformAxis rotation2: coordinates=hip_adduction_l axis=(-1 0 0) LinearFunction(coefficients=1 0)
        TransformAxis rotation3: coordinates=hip_rotation_l axis=(0 -1 0) LinearFunction(coefficients=1 0)
    CustomJoint knee_l: socket_parent_frame=femur_l_offset socket_child_frame=tibia_l_offset
      Coordinate knee_angle_l: default_value=0 range=(-2.094395 0.1745329) clamped=false
      PhysicalOffsetFrame femur_l_offset: socket_parent=/bodyset/femur_l translation=(0 0 0)
      PhysicalOffsetFrame tibia_l_offset: socket_parent=/bodyset/tibia_l translation=(0 0 0)
      SpatialTransform: axes_held_at_zero=(rotation2 rotation3 translation3)
        TransformAxis rotation1: coordinates=knee_angle_l axis=(0 0 1) LinearFunction(coefficients=1 0)
        TransformAxis translation1: coordinates=knee_angle_l axis=(1 0 0)
          SimmSpline: x=(-2.0944 -1.74533 -1.39626 -1.0472 -0.698132 -0.349066 -0.174533 0.197344 0.337395 0.490178 1.52146 2.0944)
              y=(-0.0032 0.00179 0.00411 0.0041 0.00212 -0.001 -0.0031 -0.005227 -0.005435 -0.005574 -0.005435 -0.00525)
        TransformAxis translation2: coordinates=knee_angle_l axis=(0 1 0)
          SimmSpline: x=(-2.0944 -1.22173 -0.523599 -0.349066 -0.174533 0.159149 2.0944)
              y=(-0.4226 -0.4082 -0.399 -0.3976 -0.3966 -0.395264 -0.396)
    PinJoint ankle_l: socket_parent_frame=tibia_l_offset socket_child_frame=talus_l_offset
      Coordinate ankle_angle_l: default_value=0 range=(-1.047198 1.047198) clamped=false
      PhysicalOffsetFrame tibia_l_offset: socket_parent=/bodyset/tibia_l translation=(0 -0.43 0)
      PhysicalOffsetFrame talus_l_offset: socket_parent=/bodyset/talus_l translation=(0 0 0)
    WeldJoint subtalar_l: socket_parent_frame=talus_l_offset socket_child_frame=calcn_l_offset
      PhysicalOffsetFrame talus_l_offset: socket_parent=/bodyset/talus_l translation=(-0.04877 -0.04195 -0.00792)
      PhysicalOffsetFrame calcn_l_offset: socket_parent=/bodyset/calcn_l translation=(0 0 0)
    WeldJoint mtp_l: socket_parent_frame=calcn_l_offset socket_child_frame=toes_l_offset
      PhysicalOffsetFrame calcn_l_offset: socket_parent=/bodyset/calcn_l translation=(0.1788 -0.002 -0.00108)
      PhysicalOffsetFrame toes_l_offset: socket_parent=/bodyset/toes_l translation=(0 0 0)
    PinJoint back: socket_parent_frame=pelvis_offset socket_child_frame=torso_offset
      Coordinate lumbar_extension: default_value=0 range=(-1.570796 1.570796) clamped=false
      PhysicalOffsetFrame pelvis_offset: socket_parent=/bodyset/pelvis translation=(-0.1007 0.0815 0)
      PhysicalOffsetFrame torso_offset: socket_parent=/bodyset/torso translation=(0 0 0)
    WeldJoint back_0: socket_parent_frame=torso_offset socket_child_frame=head_offset
      PhysicalOffsetFrame torso_offset: socket_parent=/bodyset/torso translation=(0 0.55 0)
      PhysicalOffsetFrame head_offset: socket_parent=/bodyset/head translation=(0 0 0)
  ForceSet:
    Thelen2003Muscle [values shared by the 15 below unless stated]: optimal_force=1 max_contraction_velocity=15
        FmaxTendonStrain=0.049 activation_time_constant=0.01 [seconds] deactivation_time_constant=0.04 [seconds]
    Thelen2003Muscle abd_r: max_isometric_force=4460.29 optimal_fiber_length=0.0845 tendon_slack_length=0.053
        pennation_angle_at_optimal=0 [radians]
      PathPoint glut_med2_r-P1: pelvis (-0.0855 0.0445 0.0766)
      PathPoint glut_med2_r-P2: transfemur (-0.0258 -0.0058 0.0527)
    Thelen2003Muscle add_r: max_isometric_force=3931.8 optimal_fiber_length=0.087 tendon_slack_length=0.06
        pennation_angle_at_optimal=0.08726646
      PathPoint add_mag1_r-P1: pelvis (-0.0732 -0.1174 0.0255)
      PathPoint add_mag1_r-P2: transfemur (-0.0045 -0.1211 0.0339)
    Thelen2003Muscle glut_max_r: max_isometric_force=3337.584 optimal_fiber_length=0.157 tendon_slack_length=0.048
        pennation_angle_at_optimal=0
      PathPoint glut_max2_r-P1: pelvis (-0.1349 0.0176 0.0563)
      PathPoint glut_max2_r-P2: pelvis (-0.1376 -0.052 0.0914)
      PathPoint glut_max2_r-P3: transfemur (-0.0426 -0.053 0.0293)
      PathPoint glut_max2_r-P4: transfemur (-0.0156 -0.1016 0.0419)
    Thelen2003Muscle iliopsoas_r: max_isometric_force=2697.344 optimal_fiber_length=0.117 tendon_slack_length=0.13
        pennation_angle_at_optimal=0.1396263
      PathPoint psoas_r-P1: pelvis (-0.0647 0.0887 0.0289)
      PathPoint psoas_r-P2: pelvis (-0.0238 -0.057 0.0759)
      ConditionalPathPoint psoas_r-P3: pelvis (-0.0288 -0.0805 0.0816) socket_coordinate=/jointset/hip_r/hip_flexion_r
          range=(-1.5708 0.785398) [radians]
      PathPoint psoas_r-P4: transfemur (0.0016 -0.0507 0.0038)
      PathPoint psoas_r-P5: transfemur (-0.0188 -0.0597 0.0104)
    Thelen2003Muscle abd_l: max_isometric_force=4460.29 optimal_fiber_length=0.0845 tendon_slack_length=0.053
        pennation_angle_at_optimal=0
      PathPoint glut_med2_l-P1: pelvis (-0.0855 0.0445 -0.0766)
      PathPoint glut_med2_l-P2: femur_l (-0.0258 -0.0058 -0.0527)
    Thelen2003Muscle add_l: max_isometric_force=3931.8 optimal_fiber_length=0.087 tendon_slack_length=0.06
        pennation_angle_at_optimal=0.08726646
      PathPoint add_mag1_l-P1: pelvis (-0.0732 -0.1174 -0.0255)
      PathPoint add_mag1_l-P2: femur_l (-0.0045 -0.1211 -0.0339)
    Thelen2003Muscle hamstrings_l: max_isometric_force=4105.466 optimal_fiber_length=0.069 tendon_slack_length=0.349
        pennation_angle_at_optimal=0.2617994 FmaxMuscleStrain=0.8
      PathPoint semimem_l-P1: pelvis (-0.1192 -0.09747 -0.07151)
      ConditionalPathPoint semimem_l-P2: tibia_l (-0.0348 -0.03519 0.01891)
          socket_coordinate=/jointset/knee_l/knee_angle_l range=(-0.558505 0.174533)
      PathPoint semimem_l-P3: tibia_l (-0.027 -0.04771 0.01957)
    Thelen2003Muscle bifemsh_l: max_isometric_force=557.1148 optimal_fiber_length=0.11 tendon_slack_length=0.117
        pennation_angle_at_optimal=0.4014257
      PathPoint P1: femur_l (0.005 -0.2111 -0.0234)
      PathPoint P2: tibia_l (-0.0301 -0.036 -0.02943)
      PathPoint P3: tibia_l (-0.0234 -0.0563 -0.0343)
    Thelen2003Muscle glut_max_l: max_isometric_force=3337.584 optimal_fiber_length=0.157 tendon_slack_length=0.048
        pennation_angle_at_optimal=0
      PathPoint glut_max2_l-P1: pelvis (-0.1349 0.0176 -0.0563)
      PathPoint glut_max2_l-P2: pelvis (-0.1376 -0.052 -0.0914)
      PathPoint glut_max2_l-P3: femur_l (-0.0426 -0.053 -0.0293)
      PathPoint glut_max2_l-P4: femur_l (-0.0156 -0.1016 -0.0419)
    Thelen2003Muscle iliopsoas_l: max_isometric_force=2697.344 optimal_fiber_length=0.117 tendon_slack_length=0.13
        pennation_angle_at_optimal=0.1396263
      PathPoint psoas_l-P1: pelvis (-0.0647 0.0887 -0.0289)
      PathPoint psoas_l-P2: pelvis (-0.0238 -0.057 -0.0759)
      ConditionalPathPoint psoas_l-P3: pelvis (-0.0288 -0.0805 -0.0816) socket_coordinate=/jointset/hip_l/hip_flexion_l
          range=(-1.5708 0.785398)
      PathPoint psoas_l-P4: femur_l (0.0016 -0.0507 -0.0038)
      PathPoint psoas_l-P5: femur_l (-0.0188 -0.0597 -0.0104)
    Thelen2003Muscle rect_fem_l: max_isometric_force=2191.741 optimal_fiber_length=0.076 tendon_slack_length=0.346
        pennation_angle_at_optimal=0.08726646 FmaxMuscleStrain=1 KshapePassive=9
      PathPoint P1: pelvis (-0.0295 -0.0311 -0.0968)
      ConditionalPathPoint P2: femur_l (0.0334 -0.403 -0.0019) socket_coordinate=/jointset/knee_l/knee_angle_l
          range=(-2.61799 -1.45997)
      MovingPathPoint P3: tibia_l socket_x_coordinate=/jointset/knee_l/knee_angle_l
          socket_y_coordinate=/jointset/knee_l/knee_angle_l socket_z_coordinate=/jointset/knee_l/knee_angle_l
        x_location: SimmSpline: x=(-2.0944 -1.99997 -1.5708 -1.45752 -1.39626 -1.0472 -0.698132 -0.526391 -0.349066 -0.174533 0 0.00017453 0.00034907 0.0279253 0.0872665 0.174533 2.0944)
            y=(0.0155805 0.0179938 0.0275081 0.0296564 0.0307615 0.0365695 0.0422074 0.0450902 0.048391 0.0534299 0.0617576 0.0617669 0.0617762 0.0633083 0.066994 0.0733035 0.0573481)
        y_location: SimmSpline: x=(-2.0944 -1.99997 -1.5708 -1.45752 -1.39626 -1.0472 -0.698132 -0.526391 -0.349066 -0.174533 0 0.00017453 0.00034907 0.0279253 0.0872665 0.174533 2.0944)
            y=(0.0234116 0.0237613 0.0251141 0.0252795 0.0253146 0.0249184 0.0242373 0.0238447 0.0234197 0.0227644 0.020984 0.0209814 0.0209788 0.0205225 0.0191754 0.0159554 -0.0673774)
        z_location: SimmSpline: x=(-2.0944 0.1745) y=(-0.0014 -0.0014)
    Thelen2003Muscle vasti_l: max_isometric_force=9593.951 optimal_fiber_length=0.099 tendon_slack_length=0.102
        pennation_angle_at_optimal=0.05235988 FmaxMuscleStrain=1 KshapePassive=9
      PathPoint vas_int_l-P1: femur_l (0.029 -0.1924 -0.031)
      PathPoint vas_int_l-P2: femur_l (0.0335 -0.2084 -0.0285)
      ConditionalPathPoint vas_int_l-P3: femur_l (0.0343 -0.403 -0.0055)
          socket_coordinate=/jointset/knee_l/knee_angle_l range=(-2.61799 -1.42)
      MovingPathPoint vas_int_l-P4: tibia_l socket_x_coordinate=/jointset/knee_l/knee_angle_l
          socket_y_coordinate=/jointset/knee_l/knee_angle_l socket_z_coordinate=/jointset/knee_l/knee_angle_l
        x_location: SimmSpline: x=(-2.0944 -1.99997 -1.5708 -1.45752 -1.39626 -1.0472 -0.698132 -0.526391 -0.349066 -0.174533 0 0.00017453 0.00034907 0.0279253 0.0872665 0.174533 2.0944)
            y=(0.0082733 0.0106866 0.0202042 0.022353 0.0234583 0.0292715 0.0349465 0.037871 0.0412569 0.0465287 0.0554632 0.0554735 0.0554837 0.0571717 0.061272 0.0684368 0.0648818)
        y_location: SimmSpline: x=(-2.0944 -1.99997 -1.5708 -1.45752 -1.39626 -1.0472 -0.698132 -0.526391 -0.349066 -0.174533 0 0.00017453 0.00034907 0.0279253 0.0872665 0.174533 2.0944)
            y=(0.025599 0.0259487 0.0273124 0.0274796 0.0275151 0.0271363 0.0265737 0.0263073 0.0261187 0.0260129 0.0252923 0.0252911 0.0252898 0.0250526 0.0242191 0.0218288 -0.0685706)
        z_location: SimmSpline: x=(-2.0944 2.0944) y=(-0.0018 -0.0018)
    Thelen2003Muscle gastroc_l: max_isometric_force=4690.574 optimal_fiber_length=0.051 tendon_slack_length=0.384
        pennation_angle_at_optimal=0.296706 FmaxTendonStrain=0.1
      PathPoint med_gas_l-P1: femur_l (-0.019 -0.3929 0.0235)
      ConditionalPathPoint med_gas_l-P2: femur_l (-0.03 -0.4022 0.0258) socket_coordinate=/jointset/knee_l/knee_angle_l
          range=(-0.785398 0.174533)
      PathPoint med_gas_l-P3: calcn_l (0 0.031 0.0053)
    Thelen2003Muscle soleus_l: max_isometric_force=7924.997 optimal_fiber_length=0.044 tendon_slack_length=0.244
        pennation_angle_at_optimal=0.4363323 FmaxTendonStrain=0.1
      PathPoint P1: tibia_l (-0.0024 -0.1533 -0.0071)
      PathPoint P2: calcn_l (0 0.031 0.0053)
    Thelen2003Muscle tib_ant_l: max_isometric_force=2116.818 optimal_fiber_length=0.068 tendon_slack_length=0.238
        pennation_angle_at_optimal=0.08726646
      PathPoint P1: tibia_l (0.0179 -0.1624 -0.0115)
      PathPoint P2: tibia_l (0.0329 -0.3951 0.0177)
      PathPoint P3: calcn_l (0.1166 0.0178 0.0305)
    CoordinateLimitForce [values shared by the 6 below unless stated]: upper_stiffness=20 [N*m/degree]
        lower_stiffness=20 [N*m/degree] damping=0.25 transition=10 [degrees]
    CoordinateLimitForce HipLimit_r: coordinate=hip_flexion_r upper_limit=120 [degrees] lower_limit=-30 [degrees]
    CoordinateLimitForce HipLimit_l: coordinate=hip_flexion_l upper_limit=120 lower_limit=-30
    CoordinateLimitForce KneeLimit_l: coordinate=knee_angle_l upper_limit=0 lower_limit=-140
    CoordinateLimitForce AnkleLimit_l: coordinate=ankle_angle_l upper_limit=20 lower_limit=-40
    CoordinateLimitForce HipAddLimit_r: coordinate=hip_adduction_r upper_limit=30 lower_limit=-40
    CoordinateLimitForce HipAddLimit_l: coordinate=hip_adduction_l upper_limit=30 lower_limit=-40
  MarkerSet:
    Marker RFMH: foot_r (0.1819395 -0.01265517 -0.02108)
    Marker LFMH: toes_l (0.0612 0.018 0.02108)
    Marker LHEE: calcn_l (-0.02 0.0164746 0.00682153)
    Marker RKNE: transfemur (0.01982076 -0.3976241 0.07409967)
    Marker LKNE: femur_l (0 -0.406982 -0.0510379)
    Marker LANK: tibia_l (-0.003 -0.41 -0.056)
    Marker RANK: piston (-0.003 -0.2481321 0.056)
    Marker RHEE: foot_r (-0.1013191 -0.02719372 -0.00682153)
    Marker RVMH: foot_r (0.1531637 -0.01602011 0.03392)
    Marker LVMH: toes_l (0.0162 0.022 -0.03392)
    Marker C7: torso (-0.07679775 0.4131205 0)
    Marker RBAK: torso (0.01561592 0.2131205 0.06539433)
    Marker RSHO: torso (0.007192548 0.4173659 0.1511445)
    Marker LSHO: torso (0.00719255 0.417366 -0.151145)
    Marker CLAV: torso (0.04990762 0.3654091 0)
    Marker RTHAP: transfemur (0.06 -0.128707 0.0333773)
    Marker RTHI: transfemur (0.00619387 -0.21551 0.07)
    Marker RTHAD: transfemur (0.05 -0.297789 0.0167458)
    Marker LTHI: femur_l (0.006193866 -0.2155096 -0.07)
    Marker LTHAP: femur_l (0.06 -0.128707 -0.0333773)
    Marker LTHAD: femur_l (0.05 -0.297789 -0.0167458)
    Marker RTIB: piston (0 -0.2 0.06)
    Marker RTIAP: piston (0.05 -0.165 -2.71095e-36)
    Marker RTIAD: piston (0.0443929 -0.06023975 -1.265092e-15)
    Marker LTIB: tibia_l (0 -0.2 -0.06)
    Marker LTIAP: tibia_l (0.05 -0.165 -2.71095e-36)
    Marker LTIAD: tibia_l (0.04439291 -0.289806 8.549763e-36)
    Marker LPSI: pelvis (-0.20897 0.0285878 -0.0633414)
    Marker RPSI: pelvis (-0.20897 0.0285878 0.0633414)
    Marker RTOE: foot_r (0.08677489 0.01822291 -5.83811e-35)
    Marker LTOE: calcn_l (0.133328 0.0605311 -5.838107e-35)
    Marker RMED: cylinder (8.357022e-25 -0.0505354 0.04951354)
    Marker LMED: tibia_l (0 0 0.06234266)
    Marker RASI: pelvis (0.008583436 0.003683379 0.1238076)
    Marker LASI: pelvis (0.00858344 0.00368338 -0.123808)
    Marker IMU_PELVIS: pelvis (-0.22897 0.0085878 0)
    Marker LFHD: torso (0.1 0.12 -0.04)
    Marker RFHD: torso (0.1 0.12 0.04)
    Marker LBHD: torso (-0.08 0.12 -0.04)
    Marker RBHD: torso (-0.08 0.12 0.04)
    Marker T10: torso (-0.09 0.163121 0)
    Marker STRN: torso (0.11 0.22 0)
    Marker LUPA: torso (0 -0.1 -0.05)
    Marker RUPA: torso (0 -0.1 0.05)
    Marker LELB: torso (0 -0.28 -0.05)
    Marker RELB: torso (0 -0.28 0.05)
    Marker LFRM: torso (-0.04 -0.15 0)
    Marker RFRM: torso (-0.04 -0.15 0)
    Marker LWRA: torso (0 0 -0.03)
    Marker LWRB: torso (0 0 0.03)
    Marker RWRA: torso (0 0 0.03)
    Marker RWRB: torso (0 0 -0.03)
    Marker LFIN: torso (-0.02 -0.07 0)
    Marker RFIN: torso (-0.02 -0.07 0)
    Marker IMU_RTIB: piston (1.104036e-23 -0.1050871 0.06)
    Marker IMU_LTIB: tibia_l (0 -0.32 -0.06)
  ContactGeometrySet:
    ContactSphere heel_r_1: socket_frame=/bodyset/foot_r location=(-0.08 -0.045 0.03826521)
        orientation=(0 5.916457e-30 -7.940934e-23) radius=0.032
    ContactSphere heel_r_2: socket_frame=/bodyset/foot_r location=(-0.08 -0.045 -0.03331222) radius=0.032
    ContactSphere heel_l_1: socket_frame=/bodyset/calcn_l location=(0.001792556 0 0.006839518) radius=0.032
    ContactSphere heel_l_2: socket_frame=/bodyset/calcn_l location=(0.08660281 0 -0.006474335) radius=0.032
    ContactSphere front_r_1: socket_frame=/bodyset/foot_r location=(0.15 -0.045 0.035) radius=0.032
    ContactSphere front_r_2: socket_frame=/bodyset/foot_r location=(0.15 -0.045 -0.035) radius=0.032
    ContactSphere front_l_1: socket_frame=/bodyset/calcn_l location=(0.1774093 0 -0.04885056) radius=0.032
    ContactSphere front_l_2: socket_frame=/bodyset/calcn_l location=(0.1774093 0 0.01900994) radius=0.032
    ContactHalfSpace floor: socket_frame=/ground orientation=(0 0 -1.570796)
